b := 4
τ := 3*10^-3
Jм := 1
k := 100
r := 0.7
c := 10^3
Jд := 2*10^-4
i := 10
S := 0.05
Sпр := S*i^2 = 5
rпр := r*i = 7
Jдпр := Jд*i^2 = 0.02
# 2.1 Характеристическое уравнение
A(p, kд, kи) := [
    Jдпр*p^2 + b*p + c, -(b*p + c), -1, 0;
    -(b*p + c), Jм*p^2 + b*p + c, 0, 0;
    Sпр*p, 0, τ*p + 1, -rпр;
    kи*k, k*(kд*p^2 + p), 0, p
]
detA(p, kд, kи) := |A(p, kд, kи)| → 700000.0*p + 700000.0*kи + 700000.0*p^2*kд + 2800.0*p^3*kд + 700.0*p^2*kи + 7800.0*p^2 + 1040.0*p^3 + 12.14*p^4 + 0.03224*p^5 + 0.00006*p^6 + 2800.0*p*kи
a1(kд, kи) := |A(p, kд, kи)| coeffs, p → [
    700000.0*kи;
    2800.0*kи + 700000.0;
    700000.0*kд + 700.0*kи + 7800.0;
    2800.0*kд + 1040.0;
    12.14;
    0.03224;
    0.00006
]
a(kд, kи) := [
    0, 0, 0, 0, 0, 0, 1;
    0, 0, 0, 0, 0, 1, 0;
    0, 0, 0, 0, 1, 0, 0;
    0, 0, 0, 1, 0, 0, 0;
    0, 0, 1, 0, 0, 0, 0;
    0, 1, 0, 0, 0, 0, 0;
    1, 0, 0, 0, 0, 0, 0
]*a1(kд, kи) → [
    0.00006;
    0.03224;
    12.14;
    2800.0*kд + 1040.0;
    700000.0*kд + 700.0*kи + 7800.0;
    2800.0*kи + 700000.0;
    700000.0*kи
]
# 2.2 Критерий устойчивости
Г(kд, kи) := [
    a(kд, kи)[1], a(kд, kи)[3], a(kд, kи)[5], 0, 0, 0;
    a(kд, kи)[0], a(kд, kи)[2], a(kд, kи)[4], a(kд, kи)[6], 0, 0;
    0, a(kд, kи)[1], a(kд, kи)[3], a(kд, kи)[5], 0, 0;
    0, a(kд, kи)[0], a(kд, kи)[2], a(kд, kи)[4], a(kд, kи)[6], 0;
    0, 0, a(kд, kи)[1], a(kд, kи)[3], a(kд, kи)[5], 0;
    0, 0, a(kд, kи)[0], a(kд, kи)[2], a(kд, kи)[4], a(kд, kи)[6]
]
Δ5(kд, kи) := det([
    a(kд, kи)[1], a(kд, kи)[3], a(kд, kи)[5], 0, 0, 0;
    a(kд, kи)[0], a(kд, kи)[2], a(kд, kи)[4], a(kд, kи)[6], 0, 0;
    0, a(kд, kи)[1], a(kд, kи)[3], a(kд, kи)[5], 0, 0;
    0, a(kд, kи)[0], a(kд, kи)[2], a(kд, kи)[4], a(kд, kи)[6], 0;
    0, 0, a(kд, kи)[1], a(kд, kи)[3], a(kд, kи)[5], 0;
    0, 0, 0, 0, 0, 1
])
Δ4(kд, kи) := det([
    a(kд, kи)[1], a(kд, kи)[3], a(kд, kи)[5], 0, 0, 0;
    a(kд, kи)[0], a(kд, kи)[2], a(kд, kи)[4], a(kд, kи)[6], 0, 0;
    0, a(kд, kи)[1], a(kд, kи)[3], a(kд, kи)[5], 0, 0;
    0, a(kд, kи)[0], a(kд, kи)[2], a(kд, kи)[4], 0, 0;
    0, 0, 0, 0, 1, 0;
    0, 0, 0, 0, 0, 1
])
Δ3(kд, kи) := det([
    a(kд, kи)[1], a(kд, kи)[3], a(kд, kи)[5], 0, 0, 0;
    a(kд, kи)[0], a(kд, kи)[2], a(kд, kи)[4], 0, 0, 0;
    0, a(kд, kи)[1], a(kд, kи)[3], 0, 0, 0;
    0, 0, 0, 1, 0, 0;
    0, 0, 0, 0, 1, 0;
    0, 0, 0, 0, 0, 1
])
Δ2(kд, kи) := det([
    a(kд, kи)[1], a(kд, kи)[3], 0, 0, 0, 0;
    a(kд, kи)[0], a(kд, kи)[2], 0, 0, 0, 0;
    0, 0, 1, 0, 0, 0;
    0, 0, 0, 1, 0, 0;
    0, 0, 0, 0, 1, 0;
    0, 0, 0, 0, 0, 1
])
D(kд, kи) := Φ(a(kд, kи)[0])*Φ(a(kд, kи)[1])*Φ(a(kд, kи)[2])*Φ(a(kд, kи)[3])*Φ(a(kд, kи)[4])*Φ(a(kд, kи)[5])*Φ(a(kд, kи)[6])*Φ(Δ2(kд, kи))*Φ(Δ3(kд, kи))*Φ(Δ4(kд, kи))*Φ(Δ5(kд, kи))
# [component: inputs D]
# [component: inputs D]
Проверка
kдΘ := 0.1
kиΘ := 0.69
D(kдΘ, kиΘ) = 1
|A(p, kдΘ, kиΘ)| solve, p → [
    -9.82190239387;
    -0.750054790285;
    -59.643942155 + 65.0183257806i;
    -203.73674592 - 314.415287062i;
    -203.73674592 + 314.415287062i;
    -59.643942155 - 65.0183257806i
]
# 2.3 Годограф Михайлова
1i^2 = -1
ω := 0, 1 .. 100000
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|A(1i*ω, kдΘ, kиΘ)| =  # no stored result
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# 3.1
kдΘ := 0.85
kиΘ := 2
D(kдΘ, kиΘ) = 1
kд := kдΘ
kи := kиΘ
h(p, kд, kи) := [0; 0; 0; kи*k]
X(p, kд, kи) := A(p, kд, kи)^-1*h(p, kд, kи)*π/p
X(p, kд, kи) → [
    200*π*(1400000*p + 350000.0*p^2 + 350000000)/(p*(35280000000*p + 30210000000*p^2 + 171000000*p^3 + 607000.0*p^4 + 1612.0*p^5 + 3.0*p^6 + 70000000000));
    200*π*(1400000*p + 350000000)/(p*(35280000000*p + 30210000000*p^2 + 171000000*p^3 + 607000.0*p^4 + 1612.0*p^5 + 3.0*p^6 + 70000000000));
    200*π*(357000000*p^2 + 1428000*p^3 + 7000.0*p^4)/(p*(35280000000*p + 30210000000*p^2 + 171000000*p^3 + 607000.0*p^4 + 1612.0*p^5 + 3.0*p^6 + 70000000000));
    (157079632679*p + 381389348.146*p^3 + 1884.95559215*p^5 + 32672563597.3*p^2 + 1012849.47152*p^4)/(p*(35280000000*p + 30210000000*p^2 + 171000000*p^3 + 607000.0*p^4 + 1612.0*p^5 + 3.0*p^6 + 70000000000))
]
U(p) := X(p, kд, kи) parfrac → [
    3.14159265359/p + (3.27215085743e39*p - 1.28272936087e43)/(1e43*p^2 + 2.51660724533e43*p + 1.05923657557e48) + (-3.13429510438e40*p - 3.66379432612e40)/(1e40*p^2 + 1.16234709919e40*p + 2.33250536344e40) + (-1.90619107458e38*p - 6.91195130066e40)/(2.5e40*p^2 + 1.33413594747e43*p + 2.3610282001e45);
    (8.11850191142e37*p + 4.03677326862e40)/(2.5e42*p^2 + 1.33413594747e45*p + 2.3610282001e47) + 3.14159265359/p + (-1.57083556537e40*p - 1.83194577636e40)/(5e39*p^2 + 5.81173549593e39*p + 1.16625268172e40) + (2.87519605741e39*p + 8.42362653181e41)/(6.25e43*p^2 + 1.57287952833e44*p + 6.62022859729e48);
    (8.14885661375e41 - 3.4593999445e39*p)/(6.25e38*p^2 + 1.57287952833e39*p + 6.62022859729e43) + (-9.76888360538e37*p - 1.17585642496e41)/(5e37*p^2 + 2.66827189494e40*p + 4.7220564002e42) + (7.48881663228e42*p + 2.93716944898e40)/(1e42*p^2 + 1.16234709919e42*p + 2.33250536344e42);
    (1.05135905953e40*p + 5.21868132678e40)/(1e40*p^2 + 1.16234709919e40*p + 2.33250536344e40) + (4.57179227785e37*p + 1.28735320556e41)/(5e38*p^2 + 2.66827189494e41*p + 4.7220564002e43) + (2.06385212936e42 - 5.71397452544e39*p)/(5e39*p^2 + 1.25830362266e40*p + 5.29618287784e44)
]
x(t) := U(p) invlaplace, p → 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
Pi := π
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3.2
3.3
Mm(t) := Jм*d^2/dt^2(x(t)[1])
Ο := 135
Ξ := 165
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# 3.4 Область допустимых значений управляющего сигнала
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# 3.5 Линии равных длителностей переходных процессов
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# 4.1  Линии равных уровней интегрального показателя качества при нулевом весовом множителе
J1 := integral((x(t)[1] - π)^2, t = 0 .. 400)
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J1 = 6.72144
4.2
J2 := integral(x(t)[3]^2, t = 0 .. 400)
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J2 = 6.09556
4.3
J := integral((x(t)[1] - π)^2 + (1*1)^2*x(t)[3]^2, t = 0 .. 400)
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J = 12.817
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