# Исходные данные
b := 10^2
s := 1.5
i := 7
m := 2000
τ := 3*10^-3
c := 10^4
k := 2
Jd := 2*10^-4
r := 4
md := Jd*i^2 = 0.0098
spr := s*i^2 = 73.5
rpr := i*r = 28
A(p, kd, kp) := [
    md*p^2 + b*p + c, -(b*p + c), -1, 0;
    -(b*p + c), m*p^2 + b*p + c, 0, 0;
    spr*p, 0, τ*p + 1, -rpr;
    kp*k, k*kd*p, 0, 1
]
h(p, kd, kp) := [0; 2000*(1/p - p/(p^2 + 0.01)); 0; 10*(kp*k/p^2 + kd*k/p)]
|A(p, kd, kp)| → 0.0588*p^5 + 619.60294*p^4 + 407001.274*p^3 + 20612248*p^2 + 5243000*p + 2800000
a1(kd, kp) := |A(p, kd, kp)| coeffs, p → [
    560000.0*kp;
    560000.0*kd + 5600.0*kp + 735000.0;
    5600.0*kd + 112000.0*kp + 20007448;
    407001.274;
    619.60294;
    0.0588
]
a(kd, kp) := [
    0, 0, 0, 0, 0, 1;
    0, 0, 0, 0, 1, 0;
    0, 0, 0, 1, 0, 0;
    0, 0, 1, 0, 0, 0;
    0, 1, 0, 0, 0, 0;
    1, 0, 0, 0, 0, 0
]*a1(kd, kp) → [
    0.0588;
    619.60294;
    407001.274;
    5600.0*kd + 112000.0*kp + 20007448;
    560000.0*kd + 5600.0*kp + 735000.0;
    560000.0*kp
]
Г(kd, kp) := [
    a(kd, kp)[1], a(kd, kp)[3], a(kd, kp)[5], 0, 0;
    a(kd, kp)[0], a(kd, kp)[2], a(kd, kp)[4], 0, 0;
    0, a(kd, kp)[1], a(kd, kp)[3], a(kd, kp)[5], 0;
    0, a(kd, kp)[0], a(kd, kp)[2], a(kd, kp)[4], 0;
    0, 0, a(kd, kp)[1], a(kd, kp)[3], a(kd, kp)[5]
]
Δ5(kd, kp) := det([
    a(kd, kp)[1], a(kd, kp)[3], a(kd, kp)[5], 0, 0;
    a(kd, kp)[0], a(kd, kp)[2], a(kd, kp)[4], 0, 0;
    0, a(kd, kp)[1], a(kd, kp)[3], a(kd, kp)[5], 0;
    0, a(kd, kp)[0], a(kd, kp)[2], a(kd, kp)[4], 0;
    0, 0, a(kd, kp)[1], a(kd, kp)[3], a(kd, kp)[5]
])
Δ4(kd, kp) := det([
    a(kd, kp)[1], a(kp, kd)[3], a(kd, kp)[5], 0, 0;
    a(kp, kd)[0], a(kd, kp)[2], a(kd, kp)[4], 0, 0;
    0, a(kd, kp)[1], a(kd, kp)[3], a(kd, kp)[5], 0;
    0, a(kd, kp)[0], a(kd, kp)[2], a(kd, kp)[4], 0;
    0, 0, 0, 0, 1
])
Δ3(kd, kp) := det([
    a(kd, kp)[1], a(kd, kp)[3], a(kd, kp)[5], 0, 0;
    a(kd, kp)[0], a(kd, kp)[2], a(kd, kp)[4], 0, 0;
    0, a(kd, kp)[1], a(kd, kp)[3], 0, 0;
    0, 0, 0, 1, 0;
    0, 0, 0, 0, 1
])
Δ2(kd, kp) := det([
    a(kd, kp)[1], a(kd, kp)[3], 0, 0, 0;
    a(kd, kp)[0], a(kd, kp)[2], 0, 0, 0;
    0, 0, 1, 0, 0;
    0, 0, 0, 1, 0;
    0, 0, 0, 0, 1
])
D(kd, kp) := Φ(Δ5(kd, kp))*Φ(Δ4(kd, kp))*Φ(Δ3(kd, kp))*Φ(Δ2(kd, kp))*Φ(a(kd, kp)[0])*Φ(a(kd, kp)[1])*Φ(a(kd, kp)[2])*Φ(a(kd, kp)[3])*Φ(a(kd, kp)[4])*Φ(a(kd, kp)[5])
# [component: inputs D]
kp
kd
kd ≡ 8
kp ≡ 5
D(kd, kp) = 1
|A(p, kd, kp)| solve, p → [
    -9837.47242701;
    -644.74762497;
    -54.9919816092;
    -0.126466197871 + 0.347174312021i;
    -0.126466197871 - 0.347174312021i
]
|A(p, kd, kp)| → 0.0588*p^5 + 619.60294*p^4 + 407001.274*p^3 + 20612248*p^2 + 5243000*p + 2800000
Re(ω) := a(kd, kp)[1]*ω^4 + (-a(kd, kp))[3]*ω^2 + a(kd, kp)[5]
Re(ω) → -20612248*ω^2 + 619.60294*ω^4 + 2800000
Im(ω) := a(kd, kp)[0]*ω^5 + (-a(kd, kp))[2]*ω^3 + a(kd, kp)[4]*ω
Im(ω) → 5243000*ω + (-407001.274*ω^3) + 0.0588*ω^5
ω := 0, 0.01 .. 5
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L(ω) := sqrt(Im(ω)^2 + Re(ω)^2)
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ω := 0, 0.01 .. 5
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ω := 0 .. 10000
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X(p, kd, kp) := [xd; x; Fd; u]  # error: Эта переменная не определена.
A(p, kd, kp) := [
    md*p^2 + b*p + c, -(b*p + c), -1, 0;
    -(b*p + c), m*p^2 + b*p + c, 0, 0;
    spr*p, 0, τ*p + 1, -rpr;
    kp*k, k*kd*p, 0, 1
]
h(p, kd, kp) := [0; 2000*(1/p - p/(p^2 + 0.01)); 0; 10*(kp*k/p^2 + kd*k/p)]
X(p, kd, kp) := A(p, kd, kp)^-1*h(p, kd, kp)
U(p) := X(p, kd, kp) parfrac → [
    (-7.40349825075e23*p - 1.51982534838e22)/(1e23*p^2 + 1e21) + (1.65980684208e41*p - 4.43259252834e41)/(5e40*p^2 + 1.26466197871e40*p + 6.82618510656e39) + 4.51785714286/p + 10.0/p^2 + (-3.44481014696e12/(2e16*p + 1.9674944854e20)) + 5.44571853279e15/(1.25e17*p + 8.05934531212e19) + (-9.54732168062e17/(2e18*p + 1.09983963218e20));
    (-7.61873245425e23*p - 1.52308675609e22)/(1e23*p^2 + 1e21) + (2.90123313359e40*p - 9.13522792372e40)/(1e40*p^2 + 2.52932395742e39*p + 1.36523702131e39) + 4.71785714286/p + 10.0/p^2 + 17330722.3925/(2e16*p + 1.9674944854e20) + (-356836684145/(1.25e17*p + 8.05934531212e19)) + (-7.09936740993e14/(2e18*p + 1.09983963218e20));
    (2.69046921828e24*p + 3.80773550809e21)/(1.25e21*p^2 + 1.25e19) + (2.10012360364e41*p + 1.34736488428e41)/(5e37*p^2 + 1.26466197871e37*p + 6.82618510656e36) + (-2000.0/p) + 8.73213791167e16/(2e16*p + 1.9674944854e20) + (-2.7448859408e20/(1.25e17*p + 8.05934531212e19)) + (-4.32215979644e21/(2e18*p + 1.09983963218e20));
    -45.1785714286/p + 3.71759495284e13/(2e16*p + 1.9674944854e20) + (-5.81382990016e16/(1.25e17*p + 8.05934531212e19)) + (3.11771408728e40*p + 2.37473109943e40)/(2.5e38*p^2 + 6.32330989356e37*p + 3.41309255328e37) + 8.92266842935e18/(2e18*p + 1.09983963218e20) + (1.52943842634e24*p + 6.01656311395e21)/(2e22*p^2 + 2e20)
]
x(t) := U(p) invlaplace, p → [
    10.0*t + 0.0435657482623*e^(-644.74762497*t) - 7.40349825075*cos(0.1*t) - 1.51982534838*sin(0.1*t) - 0.477366084031*e^(-54.9919816092*t) - 0.000172240507348*e^(-9837.47242701*t) + 3.31961368417*cos(0.347174312021*t)*e^(-0.126466197871*t) - 26.7445016991*sin(0.347174312021*t)*e^(-0.126466197871*t) + 4.51785714286;
    10.0*t - 2.85469347316e-6*e^(-644.74762497*t) - 7.61873245425*cos(0.1*t) - 1.52308675609*sin(0.1*t) - 0.000354968370496*e^(-54.9919816092*t) + 8.66536119625e-10*e^(-9837.47242701*t) + 2.90123313359*cos(0.347174312021*t)*e^(-0.126466197871*t) - 27.3699277805*sin(0.347174312021*t)*e^(-0.126466197871*t) + 4.71785714286;
    2152.37537463*cos(0.1*t) - 2195.90875264*e^(-644.74762497*t) + 30.4618840647*sin(0.1*t) - 2161.07989822*e^(-54.9919816092*t) + 4.36606895583*e^(-9837.47242701*t) + 4200.24720727*cos(0.347174312021*t)*e^(-0.126466197871*t) + 6231.85644568*sin(0.347174312021*t)*e^(-0.126466197871*t) - 2000.0;
    76.4719213172*cos(0.1*t) - 0.465106392013*e^(-644.74762497*t) + 3.00828155698*sin(0.1*t) + 4.46133421468*e^(-54.9919816092*t) + 0.00185879747642*e^(-9837.47242701*t) + 124.708563491*cos(0.347174312021*t)*e^(-0.126466197871*t) + 228.178823627*sin(0.347174312021*t)*e^(-0.126466197871*t) - 45.1785714286
]
t := 0, 0.1 .. 1000
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Fm(t) := b*(d/dt(x(t)[0]) - d/dt(x(t)[1])) + c*(x(t)[0] - x(t)[1]) + 2000*(1 - cos(0.1*t))
t1 :=
    t1 ← 0
    for t ∈ 0, 0.1 .. 100
        t1 ← t if Fm(t) > Fm(t1)
    t1
t1 = 1.8
Fm(t1) = 5771.84
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t := 0 .. 1000
Uvh(t) := x(t)[3]
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t2 :=
    t2 ← 0
    for t ∈ 0, 0.1 .. 100
        t2 ← t if |Uvh(t)| > |Uvh(t2)|
    t2
t2 = 2
Uvh(t2) = 218.163
J1(kd, kp) := integral((d/dt(x(t)[1]) - 10)^2, t = 0 .. 10000)
J1(kd, kp) = 3222.85
J2(kd, ki) := integral(x(t)[3]^2, t = 0 .. 10000)
J2(kd, kp) = 49865016
J3(kd, ki) := integral((d/dt(x(t)[1]) - 10)^2 + 0.1*x(t)[3]^2, t = 0 .. 10000)
J3(kd, kp) = 4989724
t := 0 .. 500
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