b := 4
k := 200
Jд := 2*10^-3
r := 0.2
τ := 0.03
i := 250
m := 200
c := 10^4
S := 0.2
Sпр := S*i^2 = 12500
rпр := r*i = 50
Jдпр := Jд*i^2 = 125
md := Jдпр = 125
# Область устойчивости системы управления
A(p, kп, kи) := [
    md*p^2 + b*p + c, -(b*p + c), -1, 0;
    -(b*p + c), m*p^2 + b*p + c, 0, 0;
    Sпр*p, 0, τ*p + 1, -rпр;
    0, (kп*p + kи)*k, 0, p
]
detA(p, kп, kи) := |A(p, kп, kи)| → 100000000*kи + 40000.0*p^2*kп + 125000000*p^2 + 3300000*p^3 + 2598800*p^4 + 25039.0*p^5 + 750.0*p^6 + 40000.0*p*kи + 100000000*p*kп
a1(kп, kи) := |A(p, kп, kи)| coeffs, p → [100000000*kи; 40000.0*kи + 100000000*kп; 40000.0*kп + 125000000; 3300000; 2598800; 25039.0; 750.0]
a(kп, kи) := [
    0, 0, 0, 0, 0, 0, 1;
    0, 0, 0, 0, 0, 1, 0;
    0, 0, 0, 0, 1, 0, 0;
    0, 0, 0, 1, 0, 0, 0;
    0, 0, 1, 0, 0, 0, 0;
    0, 1, 0, 0, 0, 0, 0;
    1, 0, 0, 0, 0, 0, 0
]*a1(kп, kи) → [750.0; 25039.0; 2598800; 3300000; 40000.0*kп + 125000000; 40000.0*kи + 100000000*kп; 100000000*kи]
Г(kп, kи) := [
    a(kп, kи)[1], a(kп, kи)[3], a(kп, kи)[5], 0, 0, 0;
    a(kп, kи)[0], a(kп, kи)[2], a(kп, kи)[4], a(kп, kи)[6], 0, 0;
    0, a(kп, kи)[1], a(kп, kи)[3], a(kп, kи)[5], 0, 0;
    0, a(kп, kи)[0], a(kп, kи)[2], a(kп, kи)[4], a(kп, kи)[6], 0;
    0, 0, a(kп, kи)[1], a(kп, kи)[3], a(kп, kи)[5], 0;
    0, 0, a(kп, kи)[0], a(kп, kи)[2], a(kп, kи)[4], a(kп, kи)[6]
]
Δ5(kп, kи) := det([
    a(kп, kи)[1], a(kп, kи)[3], a(kп, kи)[5], 0, 0, 0;
    a(kп, kи)[0], a(kп, kи)[2], a(kп, kи)[4], a(kп, kи)[6], 0, 0;
    0, a(kп, kи)[1], a(kп, kи)[3], a(kп, kи)[5], 0, 0;
    0, a(kп, kи)[0], a(kп, kи)[2], a(kп, kи)[4], a(kп, kи)[6], 0;
    0, 0, a(kп, kи)[1], a(kп, kи)[3], a(kп, kи)[5], 0;
    0, 0, 0, 0, 0, 1
])
Δ4(kп, kи) := det([
    a(kп, kи)[1], a(kп, kи)[3], a(kп, kи)[5], 0, 0, 0;
    a(kп, kи)[0], a(kп, kи)[2], a(kп, kи)[4], a(kп, kи)[6], 0, 0;
    0, a(kп, kи)[1], a(kп, kи)[3], a(kп, kи)[5], 0, 0;
    0, a(kп, kи)[0], a(kп, kи)[2], a(kп, kи)[4], 0, 0;
    0, 0, 0, 0, 1, 0;
    0, 0, 0, 0, 0, 1
])
Δ3(kп, kи) := det([
    a(kп, kи)[1], a(kп, kи)[3], a(kп, kи)[5], 0, 0, 0;
    a(kп, kи)[0], a(kп, kи)[2], a(kп, kи)[4], 0, 0, 0;
    0, a(kп, kи)[1], a(kп, kи)[3], 0, 0, 0;
    0, 0, 0, 1, 0, 0;
    0, 0, 0, 0, 1, 0;
    0, 0, 0, 0, 0, 1
])
Δ2(kп, kи) := det([
    a(kп, kи)[1], a(kп, kи)[3], 0, 0, 0, 0;
    a(kп, kи)[0], a(kп, kи)[2], 0, 0, 0, 0;
    0, 0, 1, 0, 0, 0;
    0, 0, 0, 1, 0, 0;
    0, 0, 0, 0, 1, 0;
    0, 0, 0, 0, 0, 1
])
D(kп, kи) := Φ(a(kп, kи)[0])*Φ(a(kп, kи)[1])*Φ(a(kп, kи)[2])*Φ(a(kп, kи)[3])*Φ(a(kп, kи)[4])*Φ(a(kп, kи)[5])*Φ(a(kп, kи)[6])*Φ(Δ2(kп, kи))*Φ(Δ3(kп, kи))*Φ(Δ4(kп, kи))*Φ(Δ5(kп, kи))
# [component: inputs D]
# [component: inputs D]
# ки | ки
кп
кп
Проверим
kпΘ := 0.5
kиΘ := 2.1
D(kпΘ, kиΘ) = 1
|A(p, kпΘ, kиΘ)| solve, p → [
    -0.218243840335 + 6.85595843671i;
    -16.2816290801 + 55.8948110164i;
    -0.19279374622 - 1.31095630643i;
    -16.2816290801 - 55.8948110164i;
    -0.218243840335 - 6.85595843671i;
    -0.19279374622 + 1.31095630643i
]
1i^2 = -1
ω := 0, 1 .. 1000
|A(1i*ω, kпΘ, kиΘ)| =  # no stored result
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x* := 1
# Часть 3
kпΘ := 0.8
kиΘ := 0.3
D(kпΘ, kиΘ) = 1
kп := kпΘ
kи := kиΘ
h(p, kп, kи) := [0; 0; 0; kи*k]
X(p, kп, kи) := A(p, kп, kи)^-1*h(p, kп, kи)*x*/p
X(p, kп, kи) → [
    (12000.0*p + 600000.0*p^2 + 30000000)/(p*(80012000*p + 125032000*p^2 + 3300000*p^3 + 2598800*p^4 + 25039.0*p^5 + 750.0*p^6 + 30000000));
    (12000.0*p + 30000000)/(p*(80012000*p + 125032000*p^2 + 3300000*p^3 + 2598800*p^4 + 25039.0*p^5 + 750.0*p^6 + 30000000));
    (75000000*p^4 + 9750000000*p^2 + 3900000*p^3)/(p*(80012000*p + 125032000*p^2 + 3300000*p^3 + 2598800*p^4 + 25039.0*p^5 + 750.0*p^6 + 30000000));
    (7500000000*p + 155928000*p^3 + 45000.0*p^5 + 1502340*p^4 + 198000000*p^2)/(p*(80012000*p + 125032000*p^2 + 3300000*p^3 + 2598800*p^4 + 25039.0*p^5 + 750.0*p^6 + 30000000))
]
X1(p) := X(p, kп, kи) parfrac → [
    (2.43721939124e38*p + 1.90740174902e40)/(5e42*p^2 + 1.62830442805e44*p + 1.69475396524e46) + 1.0/p + (-5.00099491342e41*p - 3.24272806913e41)/(5e41*p^2 + 3.22715425591e41*p + 1.21601513507e41) + (1.50238297027e41*p + 7.85057140013e41)/(1e45*p^2 + 1.738139212e44*p + 4.85237504887e46);
    1.0/p + (-9.7632760393e38*p - 3.1288523547e41)/(5e45*p^2 + 1.62830442805e47*p + 1.69475396524e49) + (-5.02543434539e41*p - 3.24272634123e41)/(5e41*p^2 + 3.22715425591e41*p + 1.21601513507e41) + (2.54353217187e42*p + 3.85807719592e41)/(5e44*p^2 + 8.69069606001e43*p + 2.42618752444e46);
    (-5.02925294199e42*p - 3.51071866278e41)/(1e41*p^2 + 1.738139212e40*p + 4.85237504887e42) + (-1.4610537712e39*p - 4.52804497201e40)/(5e37*p^2 + 1.62830442805e39*p + 1.69475396524e41) + (4.96960030274e43*p + 5.16092935587e40)/(6.25e41*p^2 + 4.03394281989e41*p + 1.52001891883e41);
    (-8.12976186425e41*p - 4.28516493541e41)/(1e42*p^2 + 1.738139212e41*p + 4.85237504887e43) + (8.12946051661e40*p + 6.08029037788e42)/(1e41*p^2 + 6.45430851182e40*p + 2.43203027013e40) + (1.50673820905e39*p + 4.99398469325e41)/(5e43*p^2 + 1.62830442805e45*p + 1.69475396524e47)
]
x(t) := X1(p) invlaplace, p → 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F(t) := -b*(d/dt(x(t)[1]) - d/dt(x(t)[0])) + (-c*(x(t)[1] - x(t)[0]))
Ξ := 42000
Ο := 38000
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# 4. Оптимальное управление
J1 := integral((x(t)[1] - x*)^2, t = 0 .. 220)
J1 = 2.12241
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4.2
J2 := integral(x(t)[3]^2, t = 0 .. 220)
J2 = 11780.5
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4.3
J := integral((x(t)[1] - x*)^2 + 1^2*x(t)[3]^2, t = 0 .. 220)
J = 11782.7
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