# Исходные данные
b := 4
s := 0.2
i := 50
Jm := 1
τ := 3*10^-3
c := 10^3
k := 100
Jd := 2*10^-3
r := 0.2
Jdpr := Jd*i^2 = 5
Spr := s*i^2 = 500
rpr := i*r = 10
A(p, kp, ki) := [
    Jdpr*p^2 + b*p + c, -(b*p + c), -1, 0;
    -(b*p + c), Jm*p^2 + b*p + c, 0, 0;
    Spr*p, 0, τ*p + 1, -rpr;
    0, k*kp*p + k*ki, 0, p
]
h(kp, ki) := [0; 0; 0; k*ki]
|A(p, kp, ki)| → 0.015*p^6 + 5.072*p^5 + 542.0*p^4 + 8000.0*p^3 + 508400.0*p^2 + 2116000*p + 4000000
a1(kp, ki) := |A(p, kp, ki)| coeffs, p → [1000000*ki; 4000*ki + 1000000*kp; 4000*kp + 500000; 8000; 542; 634/125; 3/200]
a(kp, ki) := [
    0, 0, 0, 0, 0, 0, 1;
    0, 0, 0, 0, 0, 1, 0;
    0, 0, 0, 0, 1, 0, 0;
    0, 0, 0, 1, 0, 0, 0;
    0, 0, 1, 0, 0, 0, 0;
    0, 1, 0, 0, 0, 0, 0;
    1, 0, 0, 0, 0, 0, 0
]*a1(kp, ki) → [3/200; 634/125; 542; 8000; 4000*kp + 500000; 4000*ki + 1000000*kp; 1000000*ki]
Г(kp, ki) := [
    a(kp, ki)[1], a(kp, ki)[3], a(kp, ki)[5], 0, 0, 0;
    a(kp, ki)[0], a(kp, ki)[2], a(kp, ki)[4], a(kp, ki)[6], 0, 0;
    0, a(kp, ki)[1], a(kp, ki)[3], a(kp, ki)[5], 0, 0;
    0, a(kp, ki)[0], a(kp, ki)[2], a(kp, ki)[4], a(kp, ki)[6], 0;
    0, 0, a(kp, ki)[1], a(kp, ki)[3], a(kp, ki)[5], 0;
    0, 0, a(kp, ki)[0], a(kp, ki)[2], a(kp, ki)[4], a(kp, ki)[6]
]
Δ6(kp, ki) := det([
    a(kp, ki)[1], a(kp, ki)[3], a(kp, ki)[5], 0, 0, 0;
    a(kp, ki)[0], a(kp, ki)[2], a(kp, ki)[4], a(kp, ki)[6], 0, 0;
    0, a(kp, ki)[1], a(kp, ki)[3], a(kp, ki)[5], 0, 0;
    0, a(kp, ki)[0], a(kp, ki)[2], a(kp, ki)[4], a(kp, ki)[6], 0;
    0, 0, a(kp, ki)[1], a(kp, ki)[3], a(kp, ki)[5], 0;
    0, 0, a(kp, ki)[0], a(kp, ki)[2], a(kp, ki)[4], a(kp, ki)[6]
])
Δ5(kp, ki) := det([
    a(kp, ki)[1], a(kp, ki)[3], a(kp, ki)[5], 0, 0, 0;
    a(kp, ki)[0], a(kp, ki)[2], a(kp, ki)[4], a(kp, ki)[6], 0, 0;
    0, a(kp, ki)[1], a(kp, ki)[3], a(kp, ki)[5], 0, 0;
    0, a(kp, ki)[0], a(kp, ki)[2], a(kp, ki)[4], a(kp, ki)[6], 0;
    0, 0, a(kp, ki)[1], a(kp, ki)[3], a(kp, ki)[5], 0;
    0, 0, 0, 0, 0, 1
])
Δ4(kp, ki) := det([
    a(kp, ki)[1], a(kp, ki)[3], a(kp, ki)[5], 0, 0, 0;
    a(kp, ki)[0], a(kp, ki)[2], a(kp, ki)[4], a(kp, ki)[6], 0, 0;
    0, a(kp, ki)[1], a(kp, ki)[3], a(kp, ki)[5], 0, 0;
    0, a(kp, ki)[0], a(kp, ki)[2], a(kp, ki)[4], 0, 0;
    0, 0, 0, 0, 1, 0;
    0, 0, 0, 0, 0, 1
])
Δ3(kp, ki) := det([
    a(kp, ki)[1], a(kp, ki)[3], a(kp, ki)[5], 0, 0, 0;
    a(kp, ki)[0], a(kp, ki)[2], a(kp, ki)[4], 0, 0, 0;
    0, a(kp, ki)[1], a(kp, ki)[3], 0, 0, 0;
    0, 0, 0, 1, 0, 0;
    0, 0, 0, 0, 1, 0;
    0, 0, 0, 0, 0, 1
])
Δ2(kp, ki) := det([
    a(kp, ki)[1], a(kp, ki)[3], 0, 0, 0, 0;
    a(kp, ki)[0], a(kp, ki)[2], 0, 0, 0, 0;
    0, 0, 1, 0, 0, 0;
    0, 0, 0, 1, 0, 0;
    0, 0, 0, 0, 1, 0;
    0, 0, 0, 0, 0, 1
])
D(kp, ki) := Φ(Δ6(kp, ki))*Φ(Δ5(kp, ki))*Φ(Δ4(kp, ki))*Φ(Δ3(kp, ki))*Φ(Δ2(kp, ki))*Φ(a(kp, ki)[0])*Φ(a(kp, ki)[1])*Φ(a(kp, ki)[2])*Φ(a(kp, ki)[3])*Φ(a(kp, ki)[4])*Φ(a(kp, ki)[5])*Φ(a(kp, ki)[6])
# [component: inputs D]
ki
kp
D(kp, ki) = 1
|A(p, kp, ki)| solve, p → [
    -2.15716563092 + 1.92100180689i;
    -0.913090333724 + 31.0540560203i;
    -165.996410702 - 74.5554062292i;
    -0.913090333724 - 31.0540560203i;
    -2.15716563092 - 1.92100180689i;
    -165.996410702 + 74.5554062292i
]
|A(p, kp, ki)| → 0.015*p^6 + 5.072*p^5 + 542.0*p^4 + 8000.0*p^3 + 508400.0*p^2 + 2116000*p + 4000000
Re(ω) := (-a(kp, ki))[0]*ω^6 + a(kp, ki)[2]*ω^4 + (-a(kp, ki))[4]*ω^2 + a(kp, ki)[6]
Re(ω) → 542*ω^4 - 3*ω^6/200 + (-508400.0*ω^2) + 4000000
Im(ω) := a(kp, ki)[1]*ω^5 + (-a(kp, ki))[3]*ω^3 + a(kp, ki)[5]*ω
Im(ω) → 634*ω^5/125 - 8000*ω^3 + 2116000*ω
ω := 0, 0.1 .. 20
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ω := 0, 1 .. 3000
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l(ω) := sqrt(Im(ω)^2 + Re(ω)^2)
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ω := 0, 1 .. 100000
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X(p, kp, ki) := [φrpr; φm; Mdpr; u]  # error: Эта переменная не определена.
A(p, kp, ki) := [
    Jdpr*p^2 + b*p + c, -(b*p + c), -1, 0;
    -(b*p + c), Jm*p^2 + b*p + c, 0, 0;
    Spr*p, 0, τ*p + 1, -rpr;
    0, k*kp*p + k*ki, 0, p
]
h(kp, ki) := [0; 0; 0; k*ki]
A*X == h*F'(kp, ki)
X(p, kp, ki) := A(p, kp, ki)^-1*h(kp, ki)*π/p
U(p) := X(p, kp, ki) parfrac → [
    (6.62271996547e39*p - 2.31735003393e41)/(5e42*p^2 + 9.13090333724e42*p + 4.82594064634e45) + 3.14159265359/p + (-1.57055719416e40*p - 6.88046676802e40)/(5e39*p^2 + 2.15716563092e40*p + 4.17180575065e40) + (-2.25351157108e37*p - 4.2578542608e39)/(1.25e40*p^2 + 4.14991026755e42*p + 4.13916462049e44);
    (5.08182442274e39 - 7.87418182457e37*p)/(1e43*p^2 + 3.31992821404e45*p + 3.3113316964e47) + (1.3415692471e40*p + 6.94502836565e40)/(5e41*p^2 + 9.13090333724e41*p + 4.82594064634e44) + 3.14159265359/p + (-7.92104041087e39*p - 3.44065521838e40)/(2.5e39*p^2 + 1.07858281546e40*p + 2.08590287532e40);
    (8.11948722853e41*p + 4.75023342822e40)/(5e39*p^2 + 2.15716563092e40*p + 4.17180575065e40) + (-3.2595334846e37*p - 1.0700397083e40)/(2.5e35*p^2 + 8.2998205351e37*p + 8.27832924099e39) + (7.42845826802e40 - 1.60042025932e40*p)/(5e38*p^2 + 9.13090333724e38*p + 4.82594064634e41);
    (-1.39425667385e40*p - 9.94913764713e40)/(2.5e39*p^2 + 4.56545166862e39*p + 2.41297032317e42) + (6.96920872315e38*p + 1.63869434809e41)/(1.25e38*p^2 + 5.3929140773e38*p + 1.04295143766e39) + (8.29858445476e37*p - 5.07653166138e39)/(5e40*p^2 + 1.65996410702e43*p + 1.6556658482e45)
]
x(t) := U(p) invlaplace, p → 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
t := 0, 0.1 .. 1000
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Mm(t) := b*(d/dt(x(t)[0]) - d/dt(x(t)[1])) + c*(x(t)[0] - x(t)[1])
t1 :=
    t1 ← 0
    for t ∈ 0, 0.01 .. 10
        t1 ← t if Mm(t) > Mm(t1)
    t1
kp ≡ 2.1
ki ≡ 4
t1 = 0.1
Mm(t1) = 40.3617
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Uvh(t) := x(t)[3]
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J1(kp, ki) := integral((x(t)[1] - π)^2, t = 0 .. ∞)
J1(kp, ki) = 3.79361
J2(kp, ki) := integral(x(t)[3]^2, t = 0 .. ∞)
J2(kp, ki) = 23920.3
J3(kp, ki) := integral((x(t)[1] - π)^2 + 0.001*x(t)[3]^2, t = 0 .. ∞)
J3(kp, ki) = 27.6909
t := 0, 0.01 .. 150
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