k := 200
b := 4
i := 250
Jd := 2*10^-4
x_zv := 1
s := 0.2
m := 200
τ := 3*10^-3
c := 10^3
r := 0.2
md := Jd*i^2 = 12.5
s_pr := s*i^2 = 12500
r_pr := r*i = 50
A(p, kp, kd) := [
    md*p^2 + b*p + c, -(b*p + c), -1, 0;
    -(b*p + c), m*p^2 + b*p + c, 0, 0;
    s_pr*p, 0, τ*p + 1, -r_pr;
    k*kp + k*kd*p, 0, 0, 1
]
|A(p, kp, kd)| → 10000000*kp + 12500000*p + 40000.0*kd*p^2 + 2000000*kd*p^3 + 2000000*kp*p^2 + 262500.0*p^2 + 2501487.5*p^3 + 2502.55*p^4 + 7.5*p^5 + 10000000*kd*p + 40000.0*kp*p
a1(kp, kd) := |A(p, kp, kd)| coeffs, p → [
    10000000*kp;
    10000000*kd + 40000.0*kp + 12500000;
    40000.0*kd + 2000000*kp + 262500.0;
    2000000*kd + 2501487.5;
    2502.55;
    7.5
]
a(kp, kd) := [
    0, 0, 0, 0, 0, 1;
    0, 0, 0, 0, 1, 0;
    0, 0, 0, 1, 0, 0;
    0, 0, 1, 0, 0, 0;
    0, 1, 0, 0, 0, 0;
    1, 0, 0, 0, 0, 0
]*a1(kp, kd)
Pk(p, kp, kd) := a(kp, kd)[0]*p^5 + a(kp, kd)[1]*p^4 + a(kp, kd)[2]*p^3 + a(kp, kd)[3]*p^2 + a(kp, kd)[4]*p^1 + a(kp, kd)[5]
Δ2(kp, kd) := det([a(kp, kd)[1], a(kp, kd)[3]; a(kp, kd)[0], a(kp, kd)[2]])
Δ4(kp, kd) := det([
    a(kp, kd)[1], a(kp, kd)[3], a(kp, kd)[5], 0;
    a(kp, kd)[0], a(kp, kd)[2], a(kp, kd)[4], 0;
    0, a(kp, kd)[1], a(kp, kd)[3], a(kp, kd)[5];
    0, a(kp, kd)[0], a(kp, kd)[2], a(kp, kd)[4]
])
Г(kp, kd) := [
    a(kp, kd)[1], a(kp, kd)[3], a(kp, kd)[5], 0, 0;
    a(kp, kd)[0], a(kp, kd)[2], a(kp, kd)[4], 0, 0;
    0, a(kp, kd)[1], a(kp, kd)[3], a(kp, kd)[5], 0;
    0, a(kp, kd)[0], a(kp, kd)[2], a(kp, kd)[4], 0;
    0, 0, a(kp, kd)[1], a(kp, kd)[3], a(kp, kd)[5]
]
Δ3(kp, kd) := det([
    a(kp, kd)[1], a(kp, kd)[3], a(kp, kd)[5];
    a(kp, kd)[0], a(kp, kd)[2], a(kp, kd)[4];
    0, a(kp, kd)[1], a(kp, kd)[3]
])
Δ5(kp, kd) := det([
    a(kp, kd)[1], a(kp, kd)[3], a(kp, kd)[5], 0, 0;
    a(kp, kd)[0], a(kp, kd)[2], a(kp, kd)[4], 0, 0;
    0, a(kp, kd)[1], a(kp, kd)[3], a(kp, kd)[5], 0;
    0, a(kp, kd)[0], a(kp, kd)[2], a(kp, kd)[4], 0;
    0, 0, a(kp, kd)[1], a(kp, kd)[3], a(kp, kd)[5]
])
Ф(x) :=
    1 if x > 0
    0.5 if x == 0
    0 if x < 0
D(kp, kd) := Ф(a(kp, kd)[0])*Ф(a(kp, kd)[1])*Ф(a(kp, kd)[2])*Ф(a(kp, kd)[3])*Ф(a(kp, kd)[4])*Ф(a(kp, kd)[5])*Ф(Δ2(kp, kd))*Ф(Δ3(kp, kd))*Ф(Δ4(kp, kd))*Ф(Δ5(kp, kd))
# [component: inputs D]
kp := 0.03
kd := -1.203
D(kp, kd) = 1
Pk(p, kp, kd) solve → [
    -1.05119182219;
    -290.238896728;
    -40.4678727403;
    -0.957686021394 - 1.52400506271i;
    -0.957686021394 + 1.52400506271i
]
ω := 0 .. 1000
RePk(ω) := a(kp, kd)[1]*ω^4 - a(kp, kd)[3]*ω^2 + a(kp, kd)[5]
ImPk(ω) := ω*(a(kp, kd)[0]*ω^4 - a(kp, kd)[2]*ω^2 + a(kp, kd)[4])
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h(kp) := [0; 0; 0; k*kp]
X(p, kp, kd) := A(p, kp, kd)^-1*h(kp)*x_zv/p
X1(p) := X(p, kp, kd) parfrac → [
    (7.21630225938e40*p + 2.92541715871e40)/(1e41*p^2 + 1.91537204279e41*p + 3.23975394674e41) + (-1.74233356852e20/(1e20*p + 1.05119182219e20)) + 1.0/p + (-4.80150162616e13/(1.25e17*p + 3.6279862091e19)) + 2.1087462711e17/(1e19*p + 4.04678727403e20);
    (4.25828032958e40*p - 6.81077042306e40)/(1e41*p^2 + 1.91537204279e41*p + 3.23975394674e41) + (-1.42588186042e20/(1e20*p + 1.05119182219e20)) + 1.0/p + 458718294.265/(1.25e17*p + 3.6279862091e19) + 5.38237906831e14/(1e19*p + 4.04678727403e20);
    (2.9429511022e40*p + 1.01391287158e41)/(1e38*p^2 + 1.91537204279e38*p + 3.23975394674e38) + (-3.39187177222e22/(1e20*p + 1.05119182219e20)) + (-5.05512538093e19/(1.25e17*p + 3.6279862091e19)) + 4.49302097476e21/(1e19*p + 4.04678727403e20);
    4.51119349192e22/(1e20*p + 1.05119182219e20) + 3.35324766838e18/(1.25e17*p + 3.6279862091e19) + (-2.05446085408e21/(1e19*p + 4.04678727403e20)) + (-1.33249622566e40*p - 2.82127521168e40)/(5e37*p^2 + 9.57686021394e37*p + 1.61987697337e38)
]
x(t) := X1(p) invlaplace, p → [
    0.021087462711*e^(-40.4678727403*t) - 1.74233356852*e^(-1.05119182219*t) - 0.000384120130093*e^(-290.238896728*t) + 0.721630225938*cos(1.52400506271*t)*e^(-0.957686021394*t) - 0.261517152323*sin(1.52400506271*t)*e^(-0.957686021394*t) + 1.0;
    5.38237906831e-5*e^(-40.4678727403*t) - 1.42588186042*e^(-1.05119182219*t) + 3.66974635412e-9*e^(-290.238896728*t) + 0.425828032958*cos(1.52400506271*t)*e^(-0.957686021394*t) - 0.714490144181*sin(1.52400506271*t)*e^(-0.957686021394*t) + 1.0;
    22465104873777696969*e^(-40467872740327357687*t/1000000000000000000)/50000000000000000 - 10110250761855063209*e^(-36279862091003144983*t/125000000000000000)/25000000000000000 - 33918717722163175431*e^(-525595911096336371*t/500000000000000000)/100000000000000000 + 21412787480241993274103151634*e^(-44595730555899046373087912797*t/46566128730773925781250000000)*cos(sqrt(5036317350932152495165919329755319372179124242965623636791)*t/46566128730773925781250000000)/72759576141834259033203125 + 2480351530575949884239860231032848808190958712041339939702*sqrt(5036317350932152495165919329755319372179124242965623636791)*e^(-44595730555899046373087912797*t/46566128730773925781250000000)*sin(sqrt(5036317350932152495165919329755319372179124242965623636791)*t/46566128730773925781250000000)/366440315769588960041140623052729597270017565676653149187841336242854595184326171875;
    451.119349192*e^(-1.05119182219*t) - 205.446085408*e^(-40.4678727403*t) + 26.825981347*e^(-290.238896728*t) - 266.499245131*cos(1.52400506271*t)*e^(-0.957686021394*t) - 202.776518348*sin(1.52400506271*t)*e^(-0.957686021394*t)
]
t := 0 .. 1000
Pk(p, kp, kd) solve → [
    -1.05119182219;
    -290.238896728;
    -40.4678727403;
    -0.957686021394 - 1.52400506271i;
    -0.957686021394 + 1.52400506271i
]
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tmax := 1000
J1(tmax) := integral((x(t)[1] - x_zv)^2, t = 0 .. tmax)
J2(tmax) := integral(x(t)[3]^2, t = 0 .. tmax)
J1(tmax) = 1.15648
J2(tmax) = 19943.8
Jopt(tmax) := integral((x(t)[1] - x_zv)^2 + 0.001^2/220^2*x(t)[3]^2, t = 0 .. tmax)
Jopt(tmax) = 1.15648
